U := [
    1, 2, 3, 5, 8, 0, 0, 0, 0, 0;
    0, 2, 4, 6, 9, 12, 0, 0, 0, 0;
    0, 0, 3, 7, 10, 13, 16, 0, 0, 0;
    0, 0, 0, 4, 11, 14, 17, 19, 0, 0;
    0, 0, 0, 0, 5, 15, 18, 20, 22, 0;
    0, 0, 0, 0, 0, 6, 19, 21, 23, 25;
    0, 0, 0, 0, 0, 0, 7, 22, 24, 26;
    0, 0, 0, 0, 0, 0, 0, 8, 25, 27;
    0, 0, 0, 0, 0, 0, 0, 0, 9, 28;
    0, 0, 0, 0, 0, 0, 0, 0, 0, 10
]
L := [
    1, 0, 0, 0, 0, 0, 0, 0, 0, 0;
    2, 1, 0, 0, 0, 0, 0, 0, 0, 0;
    3, 3, 1, 0, 0, 0, 0, 0, 0, 0;
    4, 4, 4, 1, 0, 0, 0, 0, 0, 0;
    5, 5, 5, 5, 1, 0, 0, 0, 0, 0;
    0, 6, 6, 6, 6, 1, 0, 0, 0, 0;
    0, 0, 7, 7, 7, 7, 1, 0, 0, 0;
    0, 0, 0, 8, 8, 8, 8, 1, 0, 0;
    0, 0, 0, 0, 9, 9, 9, 9, 1, 0;
    0, 0, 0, 0, 0, 10, 10, 10, 10, 1
]
X := [1; 2; 3; 4; 5; 6; 7; 8; 9; 10]
Y := U*X
B := L*Y
A := L*U
Y = [74; 157; 277; 426; 599; 794; 701; 559; 361; 100]
B = [74; 305; 970; 2458; 5269; 9548; 15373; 20719; 24238; 24250]
A = [
    1, 2, 3, 5, 8, 0, 0, 0, 0, 0;
    2, 6, 10, 16, 25, 12, 0, 0, 0, 0;
    3, 12, 24, 40, 61, 49, 16, 0, 0, 0;
    4, 16, 40, 76, 119, 114, 81, 19, 0, 0;
    5, 20, 50, 110, 195, 210, 183, 115, 22, 0;
    0, 12, 42, 102, 210, 330, 325, 255, 155, 25;
    0, 0, 21, 77, 182, 336, 497, 442, 339, 201;
    0, 0, 0, 32, 128, 280, 488, 664, 577, 435;
    0, 0, 0, 0, 45, 189, 396, 639, 855, 730;
    0, 0, 0, 0, 0, 60, 260, 510, 810, 1070
]
