sum(sum(1, k = 1 .. i - 1) + 2*sum(sum(1, k = 1 .. j - 1), j = 1 .. i - 1), i = 1 .. n) → n + n*(n + 1)*(2*n - 5)/6 expand → n^3/3 - n^2/2 + n/6
LU := (n^3/3 - n^2/2 + n/6)  # error: Эта переменная не определена.
sum(sum(sum(1, k = 1 .. j), j = 1 .. i - 1) + sum(sum(1, k = 1 .. i), j = i .. n), i = 1 .. n) → n*(n + 1)*(2*n + 1)/6 expand → n^3/3 + n^2/2 + n/6
sum(sum(sum(1, k = 1 .. j - 1), j = 1 .. i - 1), i = 1 .. n) + sum(sum(sum(1, k = 1 .. j - 1), j = 1 .. i), i = 1 .. n) → n + n*(n - 1)*(n + 1)/6 + n*(n + 1)*(n - 4)/6 expand → n^3/3 - n^2/2 + n/6
sum(sum(sum(1, k = i + 1 .. n), j = i + 1 .. n), i = 1 .. n) → n*(n + 1)*(2*n + 1)/6 - n^2 expand → n^3/3 - n^2/2 + n/6  # GAUSS
sum(sum(sum(1, k = i + 1 .. n), j = i + 1 .. n) + sum(1, j = i .. n), i = 1 .. n) → n*(n + 1) - n^2 + n*(n - 1)*(n + 1)/3 expand → n^3/3 + 2*n/3  # GASS2
sum(sum(1, j = 1 .. i - 1), i = 1 .. n) → n*(n + 1)/2 - n expand → n^2/2 - n/2  # Forwar
sum(sum(1, j = i + 1 .. n), i = 1 .. n) → n^2 - n*(n + 1)/2 expand → n^2/2 - n/2
